<?xml version="1.0" encoding="UTF-8"?>
<neuroml xmlns="http://www.neuroml.org/schema/neuroml2" xmlns:xsi="http://www.w3.org/2001/XMLSchema-instance" xsi:schemaLocation="http://www.neuroml.org/schema/neuroml2  http://neuroml.svn.sourceforge.net/viewvc/neuroml/NeuroML2/Schemas/NeuroML2/NeuroML_v2alpha.xsd" id="CA1">

    <include href="kap.nml"/>

    <include href="hd.nml"/>

    <include href="nax.nml"/>

    <include href="na3.nml"/>

    <include href="kdr.nml"/>

    <include href="pas.nml"/>

    <include href="kad.nml"/>

    <cell id="CA1">

        <notes>Cell exported from NEURON ModelView in NeuroML Level 2 format and imported into neuroConstruct. The densities of hd, kap, kad have been replaced with variable mechanisms recreating the densities as used in the original model from ModelDB.</notes>

        <morphology id="morphology_CA1">

            <segment id="0" name="Seg0_soma_0">
                <proximal x="0.0" y="0.0" z="0.01" diameter="7.491"/>
                <distal x="0.0" y="0.0" z="7.501" diameter="7.491"/>
            </segment>

            <segment id="1838" name="Seg0_user5_0">
                <parent segment="0"/>
                <proximal x="0.0" y="0.0" z="7.501" diameter="7.491"/>
                <distal x="3.71" y="20.98" z="7.121" diameter="4.96"/>
            </segment>

            <segment id="1839" name="Seg1_user5_0">
                <parent segment="1838"/>
                <distal x="5.55" y="21.23" z="7.561" diameter="4.51"/>
            </segment>

            <segment id="1840" name="Seg2_user5_0">
                <parent segment="1839"/>
                <distal x="5.82" y="25.06" z="7.561" diameter="4.51"/>
            </segment>

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
            <segmentGroup id="soma_0">
                <member segment="0"/>
            </segmentGroup>

            <segmentGroup id="user5_0">
                <member segment="1838"/>

                <member segment="1839"/>

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            </segmentGroup>

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
            <segmentGroup id="soma_group">
                <include segmentGroup="soma_0"/>
            </segmentGroup>

            <segmentGroup id="ModelViewParmSubset_2">
                <include segmentGroup="soma_0"/>
                <include segmentGroup="user5_0"/>
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            </segmentGroup>

            <segmentGroup id="ModelViewParmSubset_6">
                <include segmentGroup="soma_0"/>
                <include segmentGroup="user5_0"/>
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            </segmentGroup>

            <segmentGroup id="ModelViewParmSubset_9">
                <include segmentGroup="soma_0"/>
                <include segmentGroup="axon_0"/>
            </segmentGroup>

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
            <segmentGroup id="ModelViewParmSubset_7">
                <include segmentGroup="user5_0"/>
                <include segmentGroup="dendrite_15"/>
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            </segmentGroup>

            <segmentGroup id="OneSecGrp_SectionRef_3">
                <include segmentGroup="user5_0"/>
            </segmentGroup>

            <segmentGroup id="OneSecGrp_SectionRef_4">
                <include segmentGroup="dendrite_15"/>
            </segmentGroup>

            <segmentGroup id="ModelViewParmSubset_4">
                <include segmentGroup="axon_0"/>
            </segmentGroup>

            <segmentGroup id="OneSecGrp_SectionRef_5">
                <include segmentGroup="axon_0"/>
            </segmentGroup>

            <segmentGroup id="axon_group">
                <include segmentGroup="axon_0"/>
            </segmentGroup>

            <segmentGroup id="OneSecGrp_SectionRef_6">
                <include segmentGroup="dendrite_0"/>
            </segmentGroup>

            <segmentGroup id="OneSecGrp_SectionRef_7">
                <include segmentGroup="apical_dendrite_57"/>
            </segmentGroup>

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
            <segmentGroup id="ModelViewParmSubset_5">
                <include segmentGroup="dendrite_48"/>
                <include segmentGroup="dendrite_7"/>
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            </segmentGroup>

            <segmentGroup id="OneSecGrp_SectionRef_18">
                <include segmentGroup="dendrite_48"/>
            </segmentGroup>

            <segmentGroup id="OneSecGrp_SectionRef_19">
                <include segmentGroup="dendrite_34"/>
            </segmentGroup>

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
        </morphology>

            <!--Adding the biophysical parameters-->

        <biophysicalProperties id="biophys">

            <membraneProperties>

                <channelDensity condDensity="0.05 mS_per_cm2" id="hd_soma_group" ionChannel="hd" segmentGroup="soma_group"  ion="hd" erev="-30.0 mV">    <!--Note: Units of extra parameters are not known, except if it's e or erev!!-->
</channelDensity>

                <channelDensity condDensity="-1.0E8 mS_per_cm2" id="hd_ModelViewParmSubset_5" ionChannel="hd" segmentGroup="ModelViewParmSubset_5"  ion="hd" erev="-30.0 mV">    <!--Note: Units of extra parameters are not known, except if it's e or erev!!-->
</channelDensity>

                <channelDensity condDensity="-1.0E8 mS_per_cm2" id="hd_ModelViewParmSubset_7" ionChannel="hd" segmentGroup="ModelViewParmSubset_7"  ion="hd" erev="-30.0 mV">    <!--Note: Units of extra parameters are not known, except if it's e or erev!!-->
</channelDensity>

                <channelDensity condDensity="30.0 mS_per_cm2" id="kap_axon_group" ionChannel="kap" segmentGroup="axon_group" ion="k" erev="-90.0 mV"/>

                <channelDensity condDensity="30.0 mS_per_cm2" id="kap_soma_group" ionChannel="kap" segmentGroup="soma_group" ion="k" erev="-90.0 mV"/>

                <channelDensity condDensity="10.0 mS_per_cm2" id="kdr_all" ionChannel="kdr" ion="k" erev="-90.0 mV"/>

                <channelDensity condDensity="25.0 mS_per_cm2" id="na3_ModelViewParmSubset_2" ionChannel="na3" segmentGroup="ModelViewParmSubset_2" ion="na" erev="50.0 mV">    <!--Note: Units of extra parameters are not known, except if it's e or erev!!-->
</channelDensity>

                <channelDensity condDensity="125.0 mS_per_cm2" id="nax_OneSecGrp_SectionRef_5" ionChannel="nax" segmentGroup="OneSecGrp_SectionRef_5" ion="na" erev="50.0 mV"/>

                <channelDensity condDensity="0.0357143 mS_per_cm2" id="pas_all" ionChannel="pas"  ion="non_specific" erev="-58.0 mV">    <!--Note: Units of extra parameters are not known, except if it's e or erev!!-->
</channelDensity>    <!--kap with param: gmax = f(p) = (H(100 + ((-1) * p)) * 3.0E-7) * (1 + (p / 100)) on ParameterisedGroup: PathLengthOverDendrites on: dendrite_group with metric: Path Length from root (NO_TRANSLATION, NO_NORMALISATION), var: p-->
    <!--Variable Mechanisms not yet supported in NeuroML v2!!-->
    <!--hd with param: gmax = f(p) = 5.0E-10 * (1 + ((3 * p) / 100)) on ParameterisedGroup: PathLengthOverDendrites on: dendrite_group with metric: Path Length from root (NO_TRANSLATION, NO_NORMALISATION), var: p-->
    <!--Variable Mechanisms not yet supported in NeuroML v2!!-->
    <!--kad with param: gmax = f(p) = (H(p - 100) * 3.0E-7) * (1 + (p / 100)) on ParameterisedGroup: PathLengthOverDendrites on: dendrite_group with metric: Path Length from root (NO_TRANSLATION, NO_NORMALISATION), var: p-->
    <!--Variable Mechanisms not yet supported in NeuroML v2!!-->

                <spikeThresh value="0 mV"/>

                <specificCapacitance value="1.0 uF_per_cm2"/>

                <initMembPotential value="-65.0 mV"/>

            </membraneProperties>

            <intracellularProperties>

                <resistivity segmentGroup="ModelViewParmSubset_2" value="0.15 kohm_cm"/>

                <resistivity segmentGroup="OneSecGrp_SectionRef_5" value="0.05 kohm_cm"/>

            </intracellularProperties>

        </biophysicalProperties>

    </cell>

</neuroml>
